*Heading
** Job name: Job-1 Model name: Layer4-Height=15
** Generated by: Abaqus/CAE 6.14-1
*Preprint, echo=NO, model=NO, history=NO, contact=NO
**
** PARTS
**
*Part, name=Part-1
*End Part
**
**
** ASSEMBLY
**
*Assembly, name=Assembly
**
*Instance, name=Part-1-1, part=Part-1
*Node
      1,         2.25,           2.
      2, 0.0450000018,           2.
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*Element, type=CAX8RP
  1,    1,   13,  303,  110, 1915, 1916, 1917, 1918
  2,   13,   14,  304,  303, 1919, 1920, 1921, 1916
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*Nset, nset=remove
    2,    5,    6,    9,   11,   12
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*Elset, elset=remove, generate
 1780,  1820,     1
*Nset, nset=soil, generate
    1,  5647,     1
*Elset, elset=soil, generate
    1,  1820,     1
** Section: soil
*Solid Section, elset=soil, material=soil
,
*End Instance
**
*Nset, nset=Set, instance=Part-1-1
    2,    9, 5517
*Elset, elset=Set, instance=Part-1-1
 1756, 1820
*Nset, nset=Set-D, instance=Part-1-1
    3,    4,   10,   62,   63,   64
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*Elset, elset=Set-D, instance=Part-1-1
  622,  623,  624,  625,  626,  627
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*Nset, nset=Set-R, instance=Part-1-1
    1,    4,    7,    8,   88,   89
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*Elset, elset=Set-R, instance=Part-1-1
    1,   28,   55,   82,  109,  136
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*Nset, nset=Set-REMOVE, instance=Part-1-1
    2,    5,    6,    9,   11,   12
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*Elset, elset=Set-REMOVE, instance=Part-1-1, generate
 1780,  1820,     1
*Nset, nset=Set-SOIL, instance=Part-1-1, generate
    1,  5647,     1
*Elset, elset=Set-SOIL, instance=Part-1-1, generate
    1,  1820,     1
*Nset, nset=Set-U, instance=Part-1-1
    5,    8,   12,  183,  184,  185
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*Elset, elset=Set-U, instance=Part-1-1
  649,  673,  697,  721,  745,  769
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*Nset, nset=Set-left, instance=Part-1-1
    2,    5,    6,  111,  112,  113
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*Elset, elset=_Surf-1_S3, internal, instance=Part-1-1
  622,  623,  624,  625,  626,  627
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*Surface, type=ELEMENT, name=Surf-1
_Surf-1_S3, S3
*Elset, elset=_Surf-2_S4, internal, instance=Part-1-1, generate
  649,  1273,    24
*Elset, elset=_Surf-2_S3, internal, instance=Part-1-1
 1803,
*Surface, type=ELEMENT, name=Surf-2
_Surf-2_S4, S4
_Surf-2_S3, S3
*Elset, elset=_Surf-3_S4, internal, instance=Part-1-1
    1,   28,   55,   82,  109,  136
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*Elset, elset=_Surf-3_S3, internal, instance=Part-1-1, generate
 1273,  1296,     1
*Surface, type=ELEMENT, name=Surf-3
_Surf-3_S4, S4
_Surf-3_S3, S3
*Elset, elset=_Surf-22_S4, internal, instance=Part-1-1, generate
  649,  1273,    24
*Surface, type=ELEMENT, name=Surf-22
_Surf-22_S4, S4
*Elset, elset=_Surf-F_S2, internal, instance=Part-1-1, generate
 1323,  1755,    27
*Surface, type=ELEMENT, name=Surf-F
_Surf-F_S2, S2
*Elset, elset=_Surf-H_S1, internal, instance=Part-1-1, generate
 649,  672,    1
*Elset, elset=_Surf-H_S2, internal, instance=Part-1-1, generate
 1323,  1755,    27
*Surface, type=ELEMENT, name=Surf-H
_Surf-H_S1, S1
_Surf-H_S2, S2
*Nset, nset=Set-ll_PP_, internal, instance=Part-1-1
   5,   6, 111, 112, 113, 114
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*End Assembly
*Amplitude, name=Amp-1
             0.,              0.,             30.,              5.,             60.,             10.,             90.,             15.
           120.,             20.,            150.,             25.
**
** MATERIALS
**
*Material, name=soil
*Depvar
     10,
*Permeability, specific=10000.
 1e-09, 1.08
*User Material, constants=9
 1.08,  0.35,  1.19,  0.08, 0.042,  1.8,  0.33,    0.
98000.,
**
** BOUNDARY CONDITIONS
**
** Name: BC-D Type: λ��/ת��
*Boundary
Set-D, 1, 1
Set-D, 2, 2
** Name: BC-R Type: λ��/ת��
*Boundary
Set-R, 1, 1
Set-R, 2, 2
** Name: BC-U Type: λ��/ת��
*Boundary
Set-U, 2, 2
**
** PREDEFINED FIELDS
**
** Name: Predefined Field-geo   Type: Geostatic stress
*Initial Conditions, type=STRESS, GEOSTATIC
Set-SOIL, -104000., 4.5, -140000., 0., 0.6, 0.6
** Name: Predefined Field-viod   Type: Void ratio
*Initial Conditions, TYPE=RATIO
Part-1-1.soil, 1.08
*Initial Conditions, TYPE=solution
Set-SOIL,1.17,0.57,0,0,0,0,0,;
0,0,0,
** ----------------------------------------------------------------
**
** STEP: geo
**
*Step, name=geo, nlgeom=YES, unsymm=YES
*Geostatic
**
** LOADS
**
** Name: Load-D   Type: Pressure
*Dsload
Surf-1, P, 140000.
** Name: Load-GEO   Type: Body force
*Dload
Part-1-1.soil, BZ, -8000.
** Name: Load-R   Type: Pressure
*Dsload
Surf-3, HP, 84000., 17.5, 0.
** Name: Load-U   Type: Pressure
*Dsload
Surf-2, P, 104000.
**
** OUTPUT REQUESTS
**
*Restart, write, frequency=0
**
** FIELD OUTPUT: F-Output-1
**
*Output, field, variable=PRESELECT
**
** HISTORY OUTPUT: H-Output-1
**
*Output, history, variable=PRESELECT
*End Step
** ----------------------------------------------------------------
**
** STEP: remove
**
*Step, name=remove, nlgeom=YES, amplitude=STEP, unsymm=YES
*Static
0.1, 1., 1e-05, 0.2
**
** BOUNDARY CONDITIONS
**
** Name: BC Type: λ��/ת��
*Boundary
Set, 2, 2
** Name: BC-P-l Type: ��϶ѹ��
*Boundary
Set-ll_PP_, 8, 8
** Name: BC-left Type: λ��/ת��
*Boundary
Set-left, 2, 2
**
** INTERACTIONS
**
** Interaction: remove
*Model Change, remove
Set-REMOVE,
**
** OUTPUT REQUESTS
**
*Restart, write, frequency=0
**
** FIELD OUTPUT: F-Output-1
**
*Output, field, variable=PRESELECT
**
** HISTORY OUTPUT: H-Output-1
**
*Output, history, variable=PRESELECT
*End Step
** ----------------------------------------------------------------
**
** STEP: load
**
*Step, name=load, nlgeom=YES, amplitude=RAMP, inc=100000, unsymm=YES
*Soils, consolidation, end=PERIOD, utol=10000., creep=none
0.001, 1., 1e-06, 0.01,
**
** LOADS
**
** Name: Load-F   Type: Pressure
*Dsload
Surf-F, P, 209000.
**
** OUTPUT REQUESTS
**
*Restart, write, frequency=0
**
** FIELD OUTPUT: F-Output-1
**
*Output, field, variable=PRESELECT
**
** HISTORY OUTPUT: H-Output-1
**
*Output, history, variable=PRESELECT
*End Step
